// COMSOL Multiphysics 6.2.0.290 model "mo_distable_original_version15.45_11_29.4_1.2e17_5e18超细.mph"
// Outline of the model tree

Parameters
  diff = 10^29.4  // 0.1
  a1 = 0.003
  a2 = -0.1655
  a3 = 3.2305
  a4 = -25.8343
  a5 = 71.6
  Net = 1*10^15.45
  S = 2.03e-5
  r = 3e11
  dgamma = 1.36*10^19
  ddelta = 2.73*10^17

Variables
  var1 "变 量 1"
    Omega = (1-(y/(dgamma+ y)))*(1 - (y/(ddelta +y)))
    psi = log10(y)
    fai = 10^(a1*psi^4 + a2*psi^3 + a3*psi^2 + a4*psi +a5)
    F1 = 1/2*Omega*(Net + r) - S*x - 1/2*fai*x^(0.7)
    F2 = Omega*Net - (1 - Omega)*r - S*x - fai*x^(0.7)
    D11 = diff
    D21 = 0
    D12 = 0
    D22 = diff
    G1 = F1*mod1.u-(mod1.ux*D11+mod1.uy*D12)-(d(D11,x)+d(D12,y))*mod1.u
    G2 = F2*mod1.u-(mod1.ux*D21+mod1.uy*D22)-(d(D21,x)+d(D22,y))*mod1.u
    G3 = (G1^2+G2^2)/(diff*mod1.u)
    g4 = G1*F1*1/diff+G2*F2*1/diff

Geometry
  geom1 "几 何 1" (2D, length unit m)
    r1: Rectangle "矩 形 1" | pos = {1e15, 1e14}; size = {1.2e17, 5e18}
    fin: Finalize "形 成 组 合 体"

Physics
  g: GeneralFormPDE "偏 微 分 方 程" on all domains
    dependent variable u
    gfeq1: GeneralFormPDE "通 式 型 偏 微 分 方 程 1" (default) | f = 0; Ga = {G1, G2}; da = 1
    zflx1: ZeroFluxBoundary "零 通 量 1" (default)
    init1: init "初 始 值 1" (default) | u = 1

Mesh
  mesh1 "网 格 1"
    size: MeshSizeDefault "尺 寸" | hauto = 2
    ftri1: FreeTri "自 由 剖 分 三 角 形 网 格 1" on remaining entities | xscale = 100
  mesh2 "网格 2"
    size: MeshSizeDefault "大小" | hmax = 3.35E17; hmin = 1.5E15
    fq1: FreeQuad "自由四边形网格 1" on remaining entities | xscale = 100

Studies
  std1 "求 解 1"
    stat: Stationary "稳 态" | mesh = {geom1, mesh1}

Solver configurations
  sol1 "求 解 器 1" (study std1)
    v1: Variables "因 变 量 1"
    s1: Stationary "稳 态 求 解 器 1" | stol = 0.010; nonlin = on
      dDef: Direct "直 接" | linsolver = dense
      fc1: FullyCoupled "全 耦 合 1" | maxiter = 200

Datasets
  dset1: Solution "解 1" | solution = sol1
  cpt1: CutPoint2D "二 维 切 割 点 1"
    data = dset1
    method = regulargrid
    pointx = range(0,200/100,200)
    pointy = range(0,1/100,1)
    regulargridx = 100
    regulargridy = 100

Derived values
  int1: IntSurface "表面积分 1" on all domains | data = dset1; table = tbl1; expr = {u, G3, g4, u/6.2015e36, (G1^2+G2^2)^0.5}

Tables
  tbl1: Table "表格 1"
    // 表面积分 1
    因变量 u (m^2) | G3 (m^2) | g4 (m^2) | u/6.2015e36 (m^2) | 因变量 u (m^2) | G3 (m^2) | g4 (m^2) | u/6.2015e36 (m^2) | 因变量 u (m^2) | G3 (m^2) | g4 (m^2) | u/6.2015e36 (m^2)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
    6.20151e+36 | 1.02298e+35 | 9.99993e+34 | 1 | -3.38652e+35 | inf | -4.85576e+33 | -0.054608 | -3.38652e+35 | inf | -4.85576e+33 | -0.054608

Plots
  pg1: PlotGroup2D "二 维 绘 图 组 1" (disabled) | data = dset1
    surf1: Surface "面 1" | expr = u; descr = 因变量 u
      hght1: Height "高 度 表 达 式 1" (disabled) | expr = u
    arws1: ArrowSurface "面 上 箭 头 1"
      expr = {G1, G2}
      xnumber = 20
      xcoord = range(0,12,250)
      ynumber = 20
      ycoord = range(0,0.05,1)
      arrowlength = normalized
    arws2: ArrowSurface "面 上 箭 头 2" (disabled)
      expr = {mod1.ux*D11+d(D11,x)*u, mod1.uy*D22+d(D22,y)*u}
      xnumber = 20
      ynumber = 20
      arrowlength = normalized
    arws3: ArrowSurface "面 上 箭 头 3" (disabled) | expr = {F1, F2}; xnumber = 20; ynumber = 20; arrowlength = normalized
    con1: Contour "等 值 线 1" (disabled) | expr = u
  pg2: PlotGroup2D "二 维 绘 图 组 2" | data = dset1
    surf1: Surface "面 1" | data = dset1; expr = -log((u+1e-6)/6.2015e36)-100
      hght1: Height "高 度 表 达 式 1" | expr = u
    con1: Contour "等 值 线 1" | expr = F1; levelmethod = levels; levels = range(-100,100,100)
    con2: Contour "等 值 线 2" | expr = F2; levelmethod = levels; levels = range(-100,100,100)
    arws1: ArrowSurface "面 箭 头 1" | expr = {G1, G2}; arrowlength = normalized
  pg3: PlotGroup1D "一 维 绘 图 组 3" | data = dset1
    lngr1: LineGraph "线 图 1" on all boundaries | data = dset1; expr = Fd; xdata = expr; xdataexpr = x
    lngr2: LineGraph "线 图 2" on all boundaries | expr = y; xdata = expr; xdataexpr = cost
  pg4: PlotGroup2D "二维绘图组 4" | data = dset1
    surf1: Surface "表面 1" (disabled) | expr = -log(u)
    surf2: Surface "面 1" | expr = -log(u)
      hght1: Height "高 度 表 达 式 1" | expr = u

Exports
  data1: Data "数 据 1"
    data = cpt1
    expr = {abs(u), G1, G2, F1, F2}
    filename = E:\COMSOL\数据\data15.45_11_29.4_1,.2e17_5e18.txt
  img1: Image "二 维 图 象 1" | width = 2000; height = 1600; jpegfilename = F:\comsol41\economy\bistable_flux.jpg